# OpenSim document version 40600
ControlSet Control Set:
  ControlLinear [values shared by the 6 below unless stated]: is_model_control=true extrapolate=true default_min=0.02
      default_max=1 filter_on=false use_steps=false kp=100 kv=20
  ControlLinear TRIlong:
    x_nodes: ControlLinearNode: t=0.2613065 value=0.01003072
  ControlLinear TRIlat:
    x_nodes: ControlLinearNode: t=0.2613065 value=0.01067974
  ControlLinear TRImed:
    x_nodes: ControlLinearNode: t=0.2613065 value=0.01070579
  ControlLinear BIClong:
    x_nodes: ControlLinearNode: t=0.2613065 value=0.04971667
  ControlLinear BICshort:
    x_nodes: ControlLinearNode: t=0.2613065 value=0.01723057
  ControlLinear BRA:
    x_nodes: ControlLinearNode: t=0.2613065 value=0.01205059
