# OpenSim document version 40600
AnalyzeTool Bicep_Curl:
  model_file: C:\Users\saman\OneDrive\Documents\GitHub\flexiforce\OpenSIM_utils\Arm26\Flexiforce\arm26.osim
  replace_force_set: false
  results_directory: C:\Users\saman\OneDrive\Documents\GitHub\flexiforce\OpenSIM_utils\Arm26\Flexiforce\Results
  output_precision: 8
  initial_time: 0.2613065
  final_time: 0.2613065
  solve_for_equilibrium_for_auxiliary_states: false
  maximum_number_of_integrator_steps: 20000
  maximum_integrator_step_size: 1
  minimum_integrator_step_size: 1e-8
  integrator_error_tolerance: 1e-5
  external_loads_file: C:\Users\saman\OneDrive\Documents\GitHub\flexiforce\OpenSIM_utils\Arm26\Flexiforce\robot_force.xml
  coordinates_file: C:\Users\saman\OneDrive\Documents\GitHub\flexiforce\OpenSIM_utils\Arm26\Flexiforce\bicep_curl.sto
  lowpass_cutoff_frequency_for_coordinates: -1
  AnalysisSet Analyses:
    StaticOptimization: start_time=0.2613065 end_time=0.2613065 step_interval=1 in_degrees=true
        use_model_force_set=true activation_exponent=2 use_muscle_physiology=true
        optimizer_convergence_criterion=0.0001 optimizer_max_iterations=100
